# 1. Исходные данные
D := READFILE("1.pmi.txt", "delimited")
Rem ← "Исходный файл"
VZ := READFILE("2.air.txt", "delimited")
D := submatrix(D, 0, rows(D) - 1, 0, cols(D) - 1)
VZ := submatrix(VZ, 1, rows(VZ) - 1, 0, cols(VZ) - 1)
N := last(D[:, 0]) - 1 = 59998
p := ceil(D[:, 0][last(D[:, 0])]*0.01^-1) = 300
Rem ← "Количество записанных полюс для матрицы D"
K := rows(D[:, 0])*p^-1 = 200
Rem ← "Количество точек на полюс для матрицы D"
K := 200
pvz := ceil(VZ[:, 0][last(VZ[:, 0])]*0.01^-1) = 1000
Kvz := rows(VZ[:, 0])*pvz^-1 = 100
Kvz := 100
j := 0 .. p - 1
i := 0 .. N
g[j] := j
Number[i] := i
Nc := 2
Rem ← "Базовый массив данных ПМИ"
# 2. Формирование функций и переопределение массивов
α := 0.1
m := 12  # — порядок 2^m, как число точек на графике. Можно больше, чем m=12, но не перестарайся
i := 0 .. 2^m - 1
2^m = 4096
t[i] := i*2*α/(2^m - 1)
k := 0 .. last(D[:, 0]) + 3
v_r0[k] := 0
f_r0[i] := 0
v_r :=
    v_r ← v_r0
    for i ∈ 1 .. cols(D) - 1
        v_r ← augment(v_r, pspline(D[:, 0], D[:, i]))
    v_r ← submatrix(v_r, 0, rows(v_r) - 1, 1, cols(v_r) - 1)
    return v_r
f_r :=
    f_r ← f_r0
    for j ∈ 1 .. cols(D) - 1
        f_x ← 0
        for i ∈ 0 .. 2^m - 1
            t[i] ← i*2*α/(2^m - 1)
            f_x ← stack(f_x, interp(v_r[:, j - 1], D[:, 0], D[:, j], t[i]))
        f_x ← submatrix(f_x, 1, 2^m, 0, 0)
        f_r ← augment(f_r, f_x)
    f_r ← submatrix(f_r, 0, 2^m - 1, 1, cols(D) - 1)
    return f_r
# 3. Разложение функций БПФ по алгоритму Кули-Тьюки
k := 0 .. 2^(m - 1)
fft_r0[k] := 0
fft_r :=
    fft_r ← fft_r0
    for i ∈ 0 .. cols(f_r) - 1
        fft_r ← augment(fft_r, fft(f_r[:, i]))
    fft_r ← submatrix(fft_r, 0, rows(fft_r) - 1, 1, cols(fft_r) - 1)
    return fft_r
k := last(fft_r[:, 0]) = 2048  # — число гармоник
j := 0 .. k
# 4. Амплитуда, гармонка и сумма гармоник для ЭДС и индукции датчиков
# 4.1 ЭДС датчиков
a_E(M) := 2*sqrt(2^m)^-1*sqrt(Re(fft_r[:, M])^2 + Im(fft_r[:, M])^2)
S_E(t, n, M) := sqrt(2^m)^-1*Re(fft_r[:, M][0]) + 2*sqrt(2^m)^-1*sum(Re(fft_r[:, M][g])*cos(g*π*t/α) + Im(fft_r[:, M][g])*sin(g*π*t/α), g = 0 .. n)
G_E(t, n, M) := S_E(t, n, M) - S_E(t, n - 1, M)
# 4.2 ЭДС датчиков после приведения к нулю начальной фазы
S_E0(t, n, M) :=
    sqrt(2^m)^-1*Re(fft_r[:, M][0]) + 2*sqrt(2^m)^-1*sum(|fft_r[:, M][g]|*cos(g*π*(t + α + α/π*arg(m*fft_r[:, M][1]))/α - arg(m*fft_r[:, M][g])), g = 1 .. n) if n ≥ 1
    sqrt(2^m)^-1*Re(fft_r[:, M][0]) otherwise
G_E0(t, n, M) := S_E0(t, n, M) - S_E0(t, n - 1, M)
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Ψ(M) :=
    Rem ← "Расчет потокосцепления Ψ"
    y[0] ← M[0]
    for i ∈ 1 .. rows(M) - 1
        y[i] ← y[i - 1] + M[i]
    y ← submatrix(y, 0, rows(y) - 1, 0, cols(y) - 1)
    return y
LookUp(M) :=
    Rem ← "Поиск минимума м. золотого сечения"
    ϕ ← (1 + sqrt(5))*2^-1
    a ← 20*min(M)
    b ← 20*max(M)
    for i ∈ 0 .. 100
        x_1 ← b - (b - a)*ϕ^-1
        x_2 ← a + (b - a)*ϕ^-1
        a ← x_1 if |sum(M + x_1)| ≥ |sum(M + x_2)|
        b ← x_2 otherwise
    return (x_1 + x_2)*2^-1
Φ(M, r, b) :=
    Rem ← "Обработка Ψ. Формирование нового Ψ"
    Min ← [0]
    Max ← [0]
    Rem ← "1. Выравнивание Ψ по высоте на Δ за счет ЭДС"
    y ← Ψ(M + LookUp(M)) if b == 2 or b == 3
    y ← Ψ(M) otherwise
    Rem ← "2. Выравнивание по высоте на kx+b. Два варианта:"
    yk ← line(D[:, 0], y)[1]
    yb ← line(D[:, 0], y)[0]
    Rem ← "2.1. Заложенная функция mathcad"
    if r == 2
        for i ∈ 0 .. rows(y) - 1
            y[i] ← y[i] - (yb + D[:, 0][i]*yk)
    Rem ← "2.2. Функция определенная по крайним точкам Ψ"
    if r == 1
        for i ∈ 0 .. rows(y) - 1
            y[i] ← y[i] - (y[0] + D[:, 0][i]*(y[N + 1] - y[0])*(D[:, 0][N + 1] - D[:, 0][0])^-1)
    Rem ← "3. Выравнивание по высоте на Δ"
    for i ∈ 0 .. p*2^-1 - 1
        Min ← stack(Min, min(submatrix(y, 2*K*i, 2*K*(i + 1) - 1, 0, cols(y) - 1)))
        Max ← stack(Max, max(submatrix(y, 2*K*i, 2*K*(i + 1) - 1, 0, cols(y) - 1)))
    Min ← (rows(Min) - 1)^-1*sum(Min)
    Max ← (rows(Max) - 1)^-1*sum(Max)
    y ← y - (Min + (|Max| + |Min|)*2^-1) if b == 1
    y ← y + LookUp(y) if b == 3
    return y
vzA(M) :=
    Rem ← "Поиск минимального значения ВЗ под полюсом"
    Min ← [0]
    for i ∈ 0 .. pvz - 1
        Min ← stack(Min, min(submatrix(M, Kvz*i, Kvz*(i + 1) - 1, 0, cols(M) - 1)))
    Min ← submatrix(Min, 1, rows(Min) - 1, 0, cols(Min) - 1)
    return Min
iM(M, start, step) :=
    Rem ← "Интегрирование матрицы"
    Rem ← "расчет площади"
    x ← [0]
    for i ∈ 0, step .. rows(M) - 1 - start - step
        x ← stack(x, sum(M[g], g = start + i .. start + i + step - 1))
    x ← submatrix(x, 1, rows(x) - 1, 0, cols(x) - 1)
    return x
nPM(M) :=
    Rem ← "Поиск точек перехода через ноль"
    x ← [0]
    for i ∈ 1 .. rows(M) - 1
        x ← stack(x, i - 1) if M[i]*M[i - 1] < 0
    x ← submatrix(x, 1, rows(x) - 1, 0, cols(x) - 1)
    return x
Noise(M) :=
    Rem ← "Cумма сигнала с шагом полюсного"
    Rem ← "деления для формирование шума"
    x[0] ← 0
    for g ∈ 0 .. K*2^-1 - 1
        x ← stack(x, 0)
    for g ∈ K*2^-1, K*2^-1 + 1 .. rows(M) - 1 - K
        x ← stack(x, M[g - K*2^-1] + M[g + K*2^-1])
    x ← submatrix(x, 1, rows(x) - 1, 0, cols(x) - 1)
    return x
iMS(M, T) :=
    Rem ← "Интегрирование матрицы c учетом изменений"
    x ← [0]
    for i ∈ 0 .. rows(T) - 2
        x ← stack(x, sum(M[g], g = T[i] + 1 .. T[i + 1]))
    x ← submatrix(x, 1, rows(x) - 1, 0, cols(x) - 1)
    return x
nM(M) :=
    Rem ← "Поиск первого нулевого значения"
    for i ∈ 1 .. 2*K - 20
        if M[i - 1] == 0
            return i
            break
        if M[i]/M[i - 1] < 0
            return i
            break
dF(M) :=
    Rem ← "Дифференциал матрицы"
    x[0] ← 0
    for i ∈ 1 .. rows(M) - 1
        x ← stack(x, M[i] - M[i - 1])
    return x
ΔF(M) :=
    Rem ← "Среднее по матрице для 2 смежных"
    x[0] ← 0
    for i ∈ 1 .. rows(M) - 2
        x ← stack(x, (M[i + 1] + M[i - 1])*2^-1, (M[i + 1] + M[i - 1])*2^-1)
    x ← submatrix(x, 1, rows(x) - 1, 0, cols(x) - 1)
    return x
Δ(M) :=
    Rem ← "Расчет разброса по пикам"
    Rem ← "аналогична peak-to-peak"
    x[0] ← 0
    y[0] ← 0
    Rem ← "Поиск максимума на ширине двух полюсов"
    Max ← max(submatrix(M, 0, 2*K - 1, 0, cols(M) - 1))
    Matrix ← submatrix(M, 0, 2*K - 1, 0, cols(M) - 1)
    N ← submatrix(Number, 0, 2*K - 1, 0, cols(Number) - 1)
    F ← lookup(Max, Matrix, N)
    if F[0] < K
        n0 ← F[0]
        x[0] ← Matrix[F[0]]
    otherwise
        n0 ← F[0] - K
        x[0] ← Matrix[F[0] - K]
    Rem ← "Опр-ние амплитуд с заданым шагом"
    for i ∈ 0 .. p - 1
        x ← stack(x, M[i*K + n0])
    x ← submatrix(x, 1, rows(x) - 1, 0, cols(x) - 1)
    for i ∈ 1 .. p - 1
        y ← stack(y, |x[i]| + |x[i - 1]|)
    y ← submatrix(y, 1, rows(y) - 1, 0, cols(y) - 1)
    return y
ΔF4(M) :=
    Rem ← "Среднее по матрице для 4 смежных"
    x[0] ← 0
    for i ∈ 2 .. rows(M) - 3
        x ← stack(x, (M[i - 2] + M[i - 1] + M[i + 1] + M[i + 2])*4^-1)
        x ← stack(x, (M[i - 2] + M[i - 1] + M[i + 1] + M[i + 2])*4^-1)
    x ← submatrix(x, 1, rows(x) - 1, 0, cols(x) - 1)
    return x
SuM(M) :=
    Rem ← "Расчет площади"
    x ← [0]
    n ← [0]
    for i ∈ 1 .. rows(M) - 1
        n ← stack(n, i) if M[i - 1]*M[i] < 0
        if M[i - 1]*M[i] == 0 and M[i - 1]*M[i + 1] < 0
            n ← stack(n, i + 1)
            continue
        n ← stack(n, i + 2) if M[i - 1]*M[i] == 0 and M[i - 1]*M[i + 2] < 0 and M[i + 1] == 0
    n ← submatrix(n, 1, rows(n) - 1, 0, cols(n) - 1)
    for i ∈ 1 .. rows(n) - 1
        x ← stack(x, sum(M[g], g = n[i - 1] .. n[i] - 1))
    x ← submatrix(x, 1, rows(x) - 1, 0, cols(x) - 1)
    return x
mM(M) :=
    x[0] ← |M[0]|
    for i ∈ 1 .. rows(M) - 1
        x[i] ← |M[i]|
    return x
aM(M) :=
    Rem ← "Выравнивание матрицы, начало"
    Rem ← "от пересечение ЭДС с осью Х"
    Rem ← "Поиск максимума на ширине двух полюсов"
    Matrix ← submatrix(M, 0, 2*K - 1, 0, cols(M) - 1)
    Max ← max(Matrix)
    N ← submatrix(Number, 0, 2*K - 1, 0, cols(Number) - 1)
    Nmax1 ← lookup(Max, Matrix, N)
    for i ∈ Nmax1[0] - 0.05*K .. Nmax1[0] + 0.05*K
        Matrix[i] ← 0
    Max ← max(Matrix)
    Nmax2 ← lookup(Max, Matrix, N)
    Nm ← Nmax1[0] + floor((Nmax2[0] - Nmax1[0])*2^-1)
    if Nm < K*2^-1
        Null[Nm - 1 - K*2^-1, 0] ← 0
        x ← stack(submatrix(M, Nm + K*2^-1, rows(M) - 1, 0, 0), Null)
    otherwise
        Null[Nm - 1 - K*2^-1, 0] ← 0
        x ← stack(submatrix(M, Nm - K*2^-1, rows(M) - 1, 0, 0), Null)
    return x
BF(M, b) :=
    Rem ← "Обработка Холла. Формирование нового Ψ"
    Min ← [0]
    Max ← [0]
    Rem ← "1. Выравнивание по высоте на Δ"
    for i ∈ 0 .. p*2^-1 - 1
        Min ← stack(Min, min(submatrix(M, 2*K*i, 2*K*(i + 1) - 1, 0, cols(M) - 1)))
        Max ← stack(Max, max(submatrix(M, 2*K*i, 2*K*(i + 1) - 1, 0, cols(M) - 1)))
    Min ← (rows(Min) - 1)^-1*sum(Min)
    Max ← (rows(Max) - 1)^-1*sum(Max)
    M ← M - (Min + (|Max| + |Min|)*2^-1) if b == 0
    M ← M + LookUp(M) if b == 1
    return M
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PMI := iM(mM(D[:, Nc]), nM(D[:, Nc]) - 250*0, K)
ζ1 := max(PMI)^-1
Dubl(M) :=
    x[0] ← M[0]
    for i ∈ 1 .. rows(M) - 1
        x ← stack(x, M[i], M[i])
    return x
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Flux := iM(mM(Φ(D[:, Nc], 2, 1)), nM(Φ(D[:, Nc], 2, 1)), K)
FluxS := mM(iMS(Φ(D[:, Nc], 2, 1), nPM(Φ(D[:, Nc], 2, 1))))
ζ2 := max(Flux)^-1
ζ3 := max(FluxS)^-1
Hall := BF(D[:, Nc - 1], 0)
AG := vzA(VZ[:, 1])
FluxReal := iM(mM(Hall), nM(Hall), K)  # error: This program has no return value. You must account for all cases when using conditional statements in a Mathcad program.
FluxAG := -AG*.0335 + 1.5525
ζ4 := max(FluxReal)^-1  # error: This variable is undefined.
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max(vzA(VZ[:, 1])) - min(vzA(VZ[:, 1])) = 1.40267
0.20622/0.01 = 20.622
0.51012/0.01 = 51.012
LineAG(M) :=
    x[0] ← M[0]
    for i ∈ 1 .. rows(M) - 1
        x ← stack(x, M[i], M[i])
    return submatrix(x, 1, rows(x) - 1, 0, 0)
n := 87
air1 := submatrix(vzA(VZ[:, 1]), 0, n, 0, cols(vzA(VZ[:, 1])) - 1)
air2 := submatrix(vzA(VZ[:, 2]), 0, n, 0, cols(vzA(VZ[:, 2])) - 1)
g := submatrix(g, 0, n, 0, 0)
D := augment(g, air1, air2)
# 2. Формирование функций и переопределение массивов
α := 44
m := 10  # — порядок 2^m, как число точек на графике. Можно больше, чем m=12, но не перестарайся
i := 0 .. 2^m - 1
2^m = 1024
t := 0
t[i] := i*2*α/(2^m - 1)
ka := 0 .. last(D[:, 0]) + 3
v_r1[ka] := 0
f_r1[i] := 0
v_r :=
    v_r ← v_r1
    for i ∈ 1 .. cols(D) - 1
        v_r ← augment(v_r, pspline(D[:, 0], D[:, i]))
    v_r ← submatrix(v_r, 0, rows(v_r) - 1, 1, cols(v_r) - 1)
    return v_r
f_r :=
    f_r ← f_r1
    for j ∈ 1 .. cols(D) - 1
        f_x ← 0
        for i ∈ 0 .. 2^m - 1
            t[i] ← i*2*α/(2^m - 1)
            f_x ← stack(f_x, interp(v_r[:, j - 1], D[:, 0], D[:, j], t[i]))
        f_x ← submatrix(f_x, 1, 2^m, 0, 0)
        f_r ← augment(f_r, f_x)
    f_r ← submatrix(f_r, 0, 2^m - 1, 1, cols(D) - 1)
    return f_r
# 3. Разложение функций БПФ по алгоритму Кули-Тьюки
k := 0 .. 2^(m - 1)
fft_r1[k] := 0
fft_r :=
    fft_r ← fft_r1
    for i ∈ 0 .. cols(f_r) - 1
        fft_r ← augment(fft_r, fft(f_r[:, i]))
    fft_r ← submatrix(fft_r, 0, rows(fft_r) - 1, 1, cols(fft_r) - 1)
    return fft_r
k := last(fft_r[:, 0]) = 512  # — число гармоник
j := 0 .. k
# 4. Амплитуда, гармонка и сумма гармоник для ЭДС и индукции датчиков
# 4.1 ЭДС датчиков
a_E(M) := 2*sqrt(2^m)^-1*sqrt(Re(fft_r[:, M])^2 + Im(fft_r[:, M])^2)
S_E(t, n, M) :=
    sqrt(2^m)^-1*Re(fft_r[:, M][0]) + 2*sqrt(2^m)^-1*sum(Re(fft_r[:, M][g])*cos(g*π*t/α) + Im(fft_r[:, M][g])*sin(g*π*t/α), g = 1 .. n) if n ≥ 1
    sqrt(2^m)^-1*Re(fft_r[:, M][0]) otherwise
G_E(t, n, M) := S_E(t, n, M) - S_E(t, n - 1, M)
G_Eup(t, n, M) := S_E(t, n, M) - S_E(t, n - 1, M) + S_E(t, 0, M)
# 4.2 ЭДС датчиков после приведения к нулю начальной фазы
S_E0(t, n, M) :=
    sqrt(2^m)^-1*Re(fft_r[:, M][0]) + 2*sqrt(2^m)^-1*sum(|fft_r[:, M][g]|*cos(g*π*(t + α + α/π*arg(m*fft_r[:, M][1]))/α - arg(m*fft_r[:, M][g])), g = 1 .. n) if n ≥ 1
    sqrt(2^m)^-1*Re(fft_r[:, M][0]) otherwise
G_E0(t, n, M) := S_E0(t, n, M) - S_E0(t, n - 1, M)
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