# Начальные массивы напряжений
D := READFILE("DataFromMatlab_60Hz.xls", "Excel")
# по IEEE 115 11.12.3  по ГОСТ 10169 п.17.1.3
#
# dc component  апериодический
# (Iupp+Ilow)/2  (Iupp+Ilow)/2
#
# symmetrical component  периодический
# (Iupp-Ilow)/2-Iss  (Iupp-Ilow)/2-Iss
D := submatrix(D, 1, rows(D) - 1, 0, cols(D) - 1)
t_nil := D[:, 0]
f := 60  # Hz
step := t_nil[1] = 0.0005  # s
t_sc := 0.03  # s  # // начало короткого замыкания
Δ := 34  # // период в количестве точек
IΣ := 3996 = 3996  # A  # // амплитуда установившего тока короткого замыкания
U_0 := 6400/sqrt(2) = 4525.48  # V  # // действующее значение фазного напряжение обмотки статора
U_0*sqrt(3) = 7838.37  # V
z_n := 15750*(sqrt(3)*7739)^-1 = 1.17499  # Ohm  # // базисное сопротивление
Ch := 1  # // номер сигнала: 1 - фаза А; 2 - фаза В; 3 - фаза С
# 1. Поиск локальных экстремумов
Null(Μ, Τ) :=
    z ← [0, 0, 0, 0]
    for j ∈ 0 .. cols(Μ) - 1
        I ← submatrix(Μ[:, j], Τ, Τ + Δ, 0, 0)
        t ← submatrix(D[:, 0], Τ, Τ + Δ, 0, 0)
        z ← stack(z, [t[match(max(I), I)[0]], max(I), t[match(min(I), I)[0]], min(I)])
    return submatrix(z, 1, rows(z) - 1, 0, cols(z) - 1)
I_ext(Μ, Τ) :=
    z ← Null(Μ, Τ)
    for j ∈ 0 .. cols(Μ) - 1
        I ← submatrix(Μ[:, j], Τ, rows(Μ) - 2, 0, 0)
        t ← submatrix(D[:, 0], Τ, rows(D) - 2, 0, 0)
        for i ∈ 0 .. ceil(rows(I)*Δ^-1) - 3
            z1 ← z[i, 0]*t_nil[1]^-1 - Τ + Δ
            z2 ← z[i, 2]*t_nil[1]^-1 - Τ + Δ
            k ← floor(Δ*3^-1)
            m_p_max ← submatrix(I, ceil(z1 - k), ceil(z1 + k), 0, 0)
            m_p_min ← submatrix(I, ceil(z2 - k), ceil(z2 + k), 0, 0)
            t_p_max ← submatrix(t, ceil(z1 - k), ceil(z1 + k), 0, 0)
            t_p_min ← submatrix(t, ceil(z2 - k), ceil(z2 + k), 0, 0)
            x1 ← max(m_p_max)
            x2 ← min(m_p_min)
            z ← stack(z, [t_p_max[match(x1, m_p_max)[0, 0]], x1, t_p_min[match(x2, m_p_min)[0, 0]], x2])
    return submatrix(z, 0, rows(z) - 1, 0, cols(z) - 1)
# 2. Проверка корректности поиска экстремумов
# — фаза А
#
# — фаза В
#
# — фаза С
ΔΖ := [t_sc*step^-1, t_sc*step^-1; t_sc*step^-1, t_sc*step^-1; t_sc*step^-1, t_sc*step^-1] = [60, 60; 60, 60; 60, 60]  # // начальные точки
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# 3. Формирование функций и переопределение массивов
I_t := augment(I_ext(D[:, 1], ΔΖ[0, 0]), I_ext(D[:, 2], ΔΖ[1, 1]), I_ext(D[:, 3], ΔΖ[2, 0]))
α := (t_nil[last(t_nil) - 1] - t_sc)*2^-1
m := 13  # — порядок 2^m, как число точек на графике. Можно больше, чем m=12, но не перестарайся
i := 0 .. 2^m - 1
t[i] := i*2*α/(2^m - 1)
k := 0 .. last(I_t[:, 0]) + 3
v_r0[k] := 0
f_r0[i] := 0
v_r :=
    v_r ← v_r0
    for i ∈ 0, 2 .. cols(I_t) - 2
        v_r ← augment(v_r, cspline(I_t[:, i], I_t[:, i + 1]))
    v_r ← submatrix(v_r, 0, rows(v_r) - 1, 1, cols(v_r) - 1)
    return v_r
f_r :=
    f_r ← f_r0
    for j ∈ 0, 2 .. cols(I_t) - 2
        f_x ← 0
        for i ∈ 0 .. 2^m - 1
            t[i] ← i*2*α/(2^m - 1) + t_sc
            f_x ← stack(f_x, interp(v_r[:, j*2^-1], I_t[:, j], I_t[:, j + 1], t[i]))
        f_x ← submatrix(f_x, 1, 2^m, 0, 0)
        f_r ← augment(f_r, f_x)
    f_r ← submatrix(f_r, 0, 2^m - 1, 1, cols(I_t)/2)
    return f_r
# 4. Проверка корректности найденых функций
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# 5. Периодические и апериодические составляющие
I_a(Ch) := (f_r[:, 2*Ch - 2] + f_r[:, 2*Ch - 1])*2^-1
I_p(Ch) := (f_r[:, 2*Ch - 2] - f_r[:, 2*Ch - 1])*2^-1
I_pΣ := 3^-1*(I_p(1) + I_p(2) + I_p(3))
a := max(|I_a(1)[0]|, |I_a(2)[0]|, |I_a(3)[0]|) = 19090.2  # A
b := min(|I_a(1)[0]|, |I_a(2)[0]|, |I_a(3)[0]|) = 4350.51  # A
c :=
    x ← |I_a(1)[0]| if |I_a(1)[0]| ≠ a and |I_a(1)[0]| ≠ b
    x ← |I_a(2)[0]| if |I_a(2)[0]| ≠ a and |I_a(2)[0]| ≠ b
    x ← |I_a(3)[0]| otherwise
    = 14379.7  # А
I''_1 := sqrt(2*3^-1*(a^2 + b^2 - a*b)) = 14149.5  # А
I''_2 := sqrt(2*3^-1*(a^2 + c^2 - a*c)) = 14064.2  # А
I''_3 := sqrt(2*3^-1*(b^2 + c^2 - b*c)) = 10428.9  # А
I'' := (3*I''_1 + 2*I''_2 + I''_3)*6^-1 = 13500.9  # А
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# 6. Определение прямой для отсечки ΔI'(0). Расчет x'_d и x''_d
vg_l := [I_pΣ[last(I_pΣ)], -.1, .1]  # //  начальный вектор чисел a, b и с
vg_e := [I_pΣ[last(I_pΣ)], .5, 1]
ks := 1  # //  коэффициент сглаживания кривой
n_start := 600  # //  начальное время создания прямой
n_end := 7000  # //  конечное время создания прямой
t_c := 0, 0.02 .. t[n_end]  # //  время вывода прямой
t[n_start] = 0.56744  # s
t[n_end] = 6.62013  # s
smooth_I_pΣ := medsmooth(I_pΣ, ks)
I_p.line := submatrix(augment(t, smooth_I_pΣ), n_start, n_end, 0, cols(augment(t, smooth_I_pΣ)) - 1)
I_lg_l := lgsfit(I_p.line[:, 0], I_p.line[:, 1], transpose(vg_l))
I_lg_e := expfit(I_p.line[:, 0], I_p.line[:, 1], transpose(vg_e))
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transpose(I_lg_l) = [1352.61, -0.899864, 0.0331147]
transpose(I_lg_e) = [9062.46, -0.333946, 3963.95]
I_lgL(t) := I_lg_l[0]*(1 + I_lg_l[1]*exp(-I_lg_l[2]*t))^-1
I_lgE(t) := I_lg_e[0]*exp(I_lg_e[1]*t) + I_lg_e[2]
x' := sqrt(3)*sqrt(2)*U_0/(sqrt(3)*(IΣ + (I_lgE(0) - IΣ))*z_n) = 0.418138
x'' := sqrt(2)*U_0/(I_pΣ[0]*z_n) = 0.280698
# 7. Расчет τ'_d и τ''_d
τ''_dL :=
    x[0] ← I_pΣ[0] - (I_pΣ[0] - I_lgL(0))*e^-1
    t[0] ← 0
    for i ∈ 1 .. floor((2^m - 1)*(2*α)^-1)
        t[i] ← i*2*α/(2^m - 1)
        x[i] ← I_pΣ[i] - I_lgL(t[i]) - (I_pΣ[0] - I_lgL(0))*e^-1
        if x[i]*x[i - 1] < 0
            return (t[i] + t[i - 1])*2^-1
            break
    break
    = 0.092209
τ''_dE :=
    x[0] ← I_pΣ[0] - (I_pΣ[0] - I_lgE(0))*e^-1
    t[0] ← 0
    for i ∈ 1 .. floor((2^m - 1)*(2*α)^-1)
        t[i] ← i*2*α/(2^m - 1)
        x[i] ← I_pΣ[i] - I_lgE(t[i]) - (I_pΣ[0] - I_lgE(0))*e^-1
        if x[i]*x[i - 1] < 0
            return (t[i] + t[i - 1])*2^-1
            break
    break
    = 0.101666
τ'_dL := 1/(-I_lg_l[2])*ln((I_lg_l[0] - (I_lgL(0) - IΣ)*e^-1 - IΣ)/(I_lg_l[1]*((I_lgL(0) - IΣ)*e^-1 + IΣ))) = 2.82369  # s
τ''_dL = 0.092209  # s
τ'_dE := 1/I_lg_e[1]*ln((I_lg_e[0] + (I_lg_e[2] - IΣ)*(1 - e))/(I_lg_e[0]*e)) = 2.97636  # s
τ''_dE = 0.101666  # s
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(I_lgsfitsn(0) - IΣ)*e^-1 =  # error: This variable is undefined.
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