# Начальные данные
D := READFILE("/../data/csv/RecoveryVoltage_Ust_Phase-Phase.txt", "delimited")
t_nil := D[:, 0]
step := t_nil[1] = 0.0005  # s
t_sc := 0.1  # s  # // начало короткого замыкания — принято из осциллограммы тока статора
Δ := (50*t_nil[1])^-1 = 40  # // период в количестве точек
UΣ := 6405*sqrt(3) = 11093.8  # V  # // амплитуда установившего линейного напряжения холостого хода
I_k := 3964*sqrt(2)^-1 = 2802.97  # A  # // действующее значение фазного тока обмотки статора
z_n := 15750*(sqrt(3)*7739)^-1 = 1.17499  # Ohm  # // базисное сопротивление
Ch := 3  # // номер сигнала: 1 - фаза А; 2 - фаза В; 3 - фаза С
t0 := t_sc
ΔΖ := transpose([Δ*5, Δ*5, Δ*5])  # // начальные точки фазы А, В и С
# 1. Поиск локальных максимумов
I_ext(Μ, Τ) :=
    z ← [0, 0]
    for j ∈ 0 .. cols(Μ) - 1
        I ← submatrix(Μ[:, j], Τ, rows(Μ) - 2, 0, 0)
        t ← submatrix(D[:, 0], Τ, rows(D) - 2, 0, 0)
        for i ∈ 0 .. floor(rows(I)*Δ^-1) - 1
            p_I ← submatrix(I, i*Δ + 1, (i + 1)*Δ, 0, 0)
            p_t ← submatrix(t, i*Δ + 1, (i + 1)*Δ, 0, 0)
            x1 ← max(p_I)
            z ← stack(z, [p_t[match(x1, p_I)[0]], x1])
    return submatrix(z, 1, rows(z) - 1, 0, cols(z) - 1)
# 2. Проверка корректности поиска максимумов
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# 3. Формирование функций и переопределение массивов
L := min(rows(I_ext(D[:, 1], ΔΖ[0])), rows(I_ext(D[:, 2], ΔΖ[1])), rows(I_ext(D[:, 3], ΔΖ[2]))) - 1
Part(N) := submatrix(I_ext(D[:, N], ΔΖ[N - 1]), 0, L, 0, cols(I_ext(D[:, N], ΔΖ[N - 1])) - 1)
I_t := augment(Part(1), Part(2), Part(3))
α := t_nil[last(t_nil) - 1]*2^-1 - t_sc = 29.4497
m := 13  # — порядок 2^m, как число точек на графике. Можно больше, чем m=12, но не перестарайся
i := 0 .. 2^m - 1
t[i] := i*2*α/(2^m - 1)
k := 0 .. last(I_t[:, 0]) + 3
v_r0[k] := 0
f_r0[i] := 0
v_r :=
    v_r ← v_r0
    for i ∈ 0, 2 .. cols(I_t) - 1
        v_r ← augment(v_r, cspline(I_t[:, i], I_t[:, i + 1]))
    v_r ← submatrix(v_r, 0, rows(v_r) - 1, 1, cols(v_r) - 1)
    return v_r
f_r :=
    f_r ← f_r0
    for j ∈ 0, 2 .. cols(I_t) - 1
        f_x ← 0
        for i ∈ 0 .. 2^m - 1
            t[i] ← i*2*α/(2^m - 1) + t_sc
            f_x ← stack(f_x, interp(v_r[:, j*2^-1], I_t[:, j], I_t[:, j + 1], t[i]))
        f_x ← submatrix(f_x, 1, 2^m, 0, 0)
        f_r ← augment(f_r, f_x)
    f_r ← submatrix(f_r, 0, 2^m - 1, 1, cols(I_t)/2)
    return f_r
# 4. Проверка корректности найденых функций
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# 5. Определение прямой для отсечки ΔU'(0). Расчет x'_d и x''_d
S := 100
F := 8000
# //  пределы формирования логорифмической функции
t[S] = 0.719075  # s
t[F] = 57.526  # s
U_p.line := submatrix(augment(t, UΣ - f_r[:, Ch - 1]), S, F, 0, cols(augment(t, UΣ - f_r[:, Ch - 1])) - 1)  # //  начальный вектор чисел a, b и с
vg := [f_r[:, Ch - 1][F], 1, .1] = [11084.2, 1, 0.1]
U_lg := lgsfit(U_p.line[:, 0], U_p.line[:, 1], transpose(vg))
(UΣ - f_r[:, Ch - 1][F])*U_lg[0]^-1 = 0.00403728 %  # // чем ближе к нулю, тем лучше
u_lgsfitsn(t) := U_lg[0]*(1 + U_lg[1]*exp(-U_lg[2]*t))^-1
U_lg[0] = 237706
U_lg[2] = -0.102646
x' := (UΣ - u_lgsfitsn(0))/(sqrt(2)*sqrt(3)*I_k*z_n) = 0.412194
x'' := f_r[:, Ch - 1][0]/(sqrt(2)*sqrt(3)*I_k*z_n) = 0.274678
U_lg[1] = 29.5988
# 5.1. Проверочные графики
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# 6. Расчет τ'_d и τ''_d
τ''_dL :=
    x[0] ← UΣ
    t[0] ← 0
    for i ∈ 1 .. floor(2^m - 1)
        t[i] ← i*2*α/(2^m - 1)
        x[i] ← UΣ - u_lgsfitsn(t[i]) - f_r[:, Ch - 1][i] - (UΣ - u_lgsfitsn(0) - f_r[:, Ch - 1][0])*e^-1
        if x[i]*x[i - 1] < 0
            return (t[i] + t[i - 1])*2^-1
            break
    break
τ'_dL := 1/(-U_lg[2])*ln((U_lg[0] - u_lgsfitsn(0)*e^-1)/(U_lg[1]*(u_lgsfitsn(0)*e^-1))) = 9.94809  # s
τ''_dL = 0.154601  # s
e := 2.718
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τ'_d0 := 3.0*1.38/0.42 = 9.85714
τ''_d0 := 0.1*0.42/0.28 = 0.15
